units          real
atom_style     full
boundary       p p p

bond_style     harmonic
angle_style    harmonic
dihedral_style hybrid opls multi/harmonic

pair_style     lj/cut/coul/long 12.0
pair_modify    mix geometric tail yes
kspace_style   pppm 1.0e-5
special_bonds  lj/coul 0.0 0.0 0.5
